<neuroml xmlns="http://www.neuroml.org/schema/neuroml2"
    xmlns:xsi="http://www.w3.org/2001/XMLSchema-instance"
    xsi:schemaLocation="http://www.neuroml.org/schema/neuroml2  https://raw.github.com/NeuroML/NeuroML2/master/Schemas/NeuroML2/NeuroML_v2beta2.xsd"
    id="isopotential">

    <!-- NeuroML2 port of xpp-models/isopotential.ode. Uses NeuroML2 ComponentTypes (plus some custom ComponentTypes in LEMS). Parameter names and order follow original file where possible. -->

    <Include href="leak.channel.nml" />
    <Include href="Ks.channel.nml" />
    <Include href="Kf.channel.nml" />
    <Include href="Na.channel.nml" />
    <Include href="NaP.channel.nml" />

    <pointCellCondBased id="isopotential" C="4pF" v0="-54.56137733296305mV" thresh="-25mV">

    	<channelPopulation id="leak" ionChannel="leak" erev="-55mV" number="1" />
        <channelPopulation id="Ks" ionChannel="Ks" erev="-80mV" number="1" />
        <channelPopulation id="Kf" ionChannel="Kf" erev="-80mV" number="1" />
        <channelPopulation id="Na" ionChannel="Na" erev="45mV" number="1" />
        <channelPopulation id="NaP" ionChannel="NaP" erev="45mV" number="1" />

    </pointCellCondBased>

</neuroml>
